// COMSOL Multiphysics 6.4.0.293 model "v10_literature_channel_medium.mph"
// Outline of the model tree

Parameters
  caseId = 1
  Tin = 21[degC]
  L = 60[mm]
  cellWidth = 280[mm]
  nChannels = 80
  pitch = cellWidth/nChannels
  hCh = 2.5[mm]
  wLong = 2.5[mm]
  theta = 80[deg]
  wShort = wLong-2*hCh/tan(theta)
  ACh = (wLong+wShort)*hCh/2
  PCh = wLong+wShort+2*hCh/sin(theta)
  Dh = 4*ACh/PCh
  tBP = 5.5[mm]
  tGDLa = 0.2[mm]
  tGDLc = 0.2[mm]
  tCCM = 0.05[mm]
  kBPip = 60[W/(m*K)]
  kGDLip = 10[W/(m*K)]
  kCCM = 1.5[W/(m*K)]
  kAxial = pitch*(kBPip*tBP+kGDLip*(tGDLa+tGDLc)+kCCM*tCCM)
  rhoAir = 1.204[kg/m^3]
  CpAir = 1006[J/(kg*K)]
  kAir = 0.02514[W/(m*K)]
  muAir = 1.825e-5[Pa*s]
  Nu = 3.610224
  hForced = Nu*kAir/Dh
  uin = if(caseId<1.5,1.76[m/s],if(caseId<2.5,2.19[m/s],if(caseId<3.5,1.63[m/s],if(caseId<4.5,1.45[m/s],if(caseId<5.5,0.95[m/s],0.94[m/s])))))
  qCell = if(caseId<1.5,55.7[W],if(caseId<2.5,37.7[W],if(caseId<3.5,27.6[W],if(caseId<4.5,29.1[W],if(caseId<5.5,6.3[W],13.7[W])))))

Variables
  var1 "变量 1" on selection selDomain
    qLine = qCell/(nChannels*L)
    hP = hForced*PCh
    mdot = rhoAir*uin*ACh
    mcp = mdot*CpAir
    Re = rhoAir*uin*Dh/muAir
    fDarcy = 56.91/Re
    deltaP = fDarcy*(L/Dh)*rhoAir*uin^2/2

Selections
  selDomain: Explicit "显式" on all domains
  selInlet: Explicit "显式 2" on boundaries 1
  selOutlet: Explicit "显式 3" on boundaries 2

Couplings
  intop: Integration "积分" on selection selDomain
  maxop: Maximum "最大值" on selection selDomain
  minop: Minimum "最小值" on selection selDomain
  outop: Average "平均值" on selection selOutlet

Geometry
  geom1 "几何 1" (1D, length unit m)
    interval1: Interval "线段间隔 1" | coord = {0, L}; p1 = 0; p2 = L
    fin: Finalize "形成联合体"

Physics
  solid: GeneralFormPDE "一般形式偏微分方程" on all domains
    dependent variable T
    Units.DependentVariableQuantity = temperature
    Units.CustomSourceTermUnit = W/m
    gfeq1: GeneralFormPDE "一般形式偏微分方程 1" (default) | f = qLine-hP*(T-Ta); Ga = -kAxial*Tx; da = 1
    zflx1: ZeroFluxBoundary "零通量 1" (default)
    init1: init "初始值 1" (default) | T = 50[degC]
  air: GeneralFormPDE "一般形式偏微分方程 2" on all domains
    dependent variable Ta
    Units.DependentVariableQuantity = temperature
    Units.CustomSourceTermUnit = W/m
    gfeq1: GeneralFormPDE "一般形式偏微分方程 1" (default) | f = hP*(T-Ta)-mcp*Tax; Ga = 0[W]; da = 1
    zflx1: ZeroFluxBoundary "零通量 1" (default)
    init1: init "初始值 1" (default) | Ta = Tin
    inletTemperature: DirichletBoundary "狄利克雷边界条件" on selection selInlet | r = Tin

Mesh
  mesh1 "网格 1"
    size: MeshSizeDefault "大小" | hmax = 0.00402; hmin = 1.8E-5; hcurve = 0.3; hgrad = 1.3
    edge1: Edge "边 1" on selection selDomain
      distribution1: Distribution "分布 1" on domains 1 | numelem = 100

Studies
  std1 "研究 1"
    param: Parametric "参数化扫描" | pname = caseId; plistarr = 1 2 3 4 5 6
    stat: Stationary "稳态"

Solver configurations
  sol1 "解 1" (study std1)
    v1: Variables "因变量 1"
    s1: Stationary "稳态求解器 1"
      dDef: Direct "直接"
      p1: Parametric "参数化 1"
      fc1: FullyCoupled "全耦合 1"

Datasets
  dset1: Solution | solution = sol1

Derived values
  metrics: EvalGlobal "全局计算"
    data = dset1
    table = metricsTable
    expr = {intop(if(x<L/3,T-273.15[K],0[K]))/intop(if(x<L/3,1,0)), intop(if(x>=L/3&&x<2*L/3,T-273.15[K],0[K]))/intop(if(x>=L/3&&x<2*L/3,1,0)), intop(if(x>=2*L/3,T-273.15[K],0[K]))/intop(if(x>=2*L/3,1,0)), maxop(T)-273.15[K], minop(T)-273.15[K], maxop(T)-minop(T), maxop(T,x)/L, outop(Ta)-273.15[K], rhoAir*uin*ACh*CpAir*(outop(Ta)-Tin), qCell/nChannels, abs((qCell/nChannels)-(rhoAir*uin*ACh*CpAir*(outop(Ta)-Tin)))/abs(qCell/nChannels), rhoAir*uin*ACh, rhoAir*uin*Dh/muAir, Nu, hForced, (56.91/(rhoAir*uin*Dh/muAir))*(L/Dh)*rhoAir*uin^2/2}

Exports
  metricsExport: Table "表格" | table = metricsTable; filename = comsol/v10_reference/metrics_medium.csv
  profileExport: Data "数据"
    data = dset1
    expr = {T-273.15[K], Ta-273.15[K]}
    filename = comsol/v10_reference/profiles_medium.csv
    sort = on