// COMSOL Multiphysics 6.4.0.293 model "stage1_default_solver_0p1ms.mph"
// Outline of the model tree

Parameters
  L = 0.30[m]
  W = 0.082333333[m]
  Hair = 1[mm]
  Ain = 3962[mm^2]
  areaScale = Ain/(W*Hair)
  uin = 0.1[m/s]
  tol = 1e-7[m]

Selections
  selInlet: Box "框"
    entitydim = 2
    xmin = -tol
    xmax = tol
    ymin = -tol
    ymax = W+tol
    zmin = -tol
    zmax = Hair+tol
    condition = inside
  selOutlet: Box "框 2"
    entitydim = 2
    xmin = L-tol
    xmax = L+tol
    ymin = -tol
    ymax = W+tol
    zmin = -tol
    zmax = Hair+tol
    condition = inside
  selEdgeZ0: Box "框 3"
    entitydim = 1
    xmin = -tol
    xmax = tol
    ymin = -tol
    ymax = tol
    zmin = -tol
    zmax = Hair+tol
    condition = inside
  selEdgeZW: Box "框 4"
    entitydim = 1
    xmin = -tol
    xmax = tol
    ymin = W-tol
    ymax = W+tol
    zmin = -tol
    zmax = Hair+tol
    condition = inside
  selThicknessEdges: Union "并集" | entitydim = 1; input = {selEdgeZ0, selEdgeZW}
  selWidthEdge0: Box "框 5"
    entitydim = 1
    xmin = -tol
    xmax = tol
    ymin = -tol
    ymax = W+tol
    zmin = -tol
    zmax = tol
    condition = inside
  selWidthEdgeH: Box "框 6"
    entitydim = 1
    xmin = -tol
    xmax = tol
    ymin = -tol
    ymax = W+tol
    zmin = Hair-tol
    zmax = Hair+tol
    condition = inside
  selWidthEdges: Union "并集 2" | entitydim = 1; input = {selWidthEdge0, selWidthEdgeH}

Couplings
  intIn: Integration "积分 2" on selection selInlet
  intOut: Integration "积分 3" on selection selOutlet
  maxAir: Maximum "最大值" on selection geom1_air_dom
  minAir: Minimum "最小值" on selection geom1_air_dom

Geometry
  geom1 "几何 1" (3D, length unit m)
    air: Block "长方体" | size = {L, W, Hair}
    fin: Finalize "形成联合体"

Materials
  airmat: Common "材料" on selection geom1_air_dom
    def: def "基本"
      density = 1.184[kg/m^3]
      dynamicviscosity = 1.849e-5[Pa*s]

Physics
  spf: LaminarFlow "层流" on selection geom1_air_dom
    dependent variable u = {u, v, w}
    ShapeProperty.order_fluid = 2
    fp1: FluidProperties "流体属性 1" (default)
    init1: init "初始值 1" (default)
    wallbc1: WallBC "壁 1" (default)
    inl1: Inlet "入口 1" on selection selInlet | BoundaryCondition = Velocity; U0in = uin
    out1: Outlet "出口 1" on selection selOutlet | BoundaryCondition = Pressure; p0 = 0[Pa]

Mesh
  mesh1 "网格 1"
    size: MeshSizeDefault "大小" | hmax = 0.03; hmin = 0.0054; hcurve = 0.6; hnarrow = 0.5; hgrad = 1.5
    edg1: Edge "边 1" on selection selThicknessEdges
      dis1: Distribution "分布 1" on edges 1, 6 | numelem = 4
    edg2: Edge "边 2" on selection selWidthEdges
      dis1: Distribution "分布 1" on edges 2, 4 | numelem = 16
    map1: Map "映射 1" on selection selInlet
    swe1: Sweep "扫掠 1" on selection geom1_air_dom | sourceface = selection selInlet; targetface = selection selOutlet
      dis1: Distribution "分布 1" on domains 1 | numelem = 60

Studies
  std1 "研究 1"
    stat: Stationary "稳态"

Solver configurations
  sol1 "解 1" (study std1)
    v1: Variables "因变量 1"
    s1: Stationary "稳态求解器 1"
      fc1: FullyCoupled "全耦合 1"
      i1: Iterative "AMG，流体流动变量 (spf)"
        mg1: Multigrid "多重网格 1"

Datasets
  dset1: Solution | solution = sol1

Derived values
  gevStage1: EvalGlobal "全局计算 1"
    data = dset1
    expr = {abs(intIn(spf.rho*(u*nx+v*ny+w*nz))), abs(intOut(spf.rho*(u*nx+v*ny+w*nz))), areaScale*abs(intIn(spf.rho*(u*nx+v*ny+w*nz))), areaScale*abs(intOut(spf.rho*(u*nx+v*ny+w*nz))), abs(abs(intIn(spf.rho*(u*nx+v*ny+w*nz)))-abs(intOut(spf.rho*(u*nx+v*ny+w*nz))))/abs(intIn(spf.rho*(u*nx+v*ny+w*nz))), minAir(p), maxAir(p), maxAir(p)-minAir(p), maxAir(sqrt(u^2+v^2+w^2))}