// COMSOL Multiphysics 6.4.0.293 model "physical_heat_medium.mph"
// Outline of the model tree

Parameters
  AinStack = 3962[mm^2]
  nCells = 40
  AinCell = AinStack/nCells
  Hair = 1[mm]
  W = AinCell/Hair
  AheatCell = 0.0247[m^2]
  L = AheatCell/W
  Hs = 10[mm]
  uin = 4[m/s]
  Tin = 25[degC]
  Tamb = 25[degC]
  qflux = 2425.5[W/m^2]
  rhoAir = 1.184[kg/m^3]
  CpAir = 1007[J/(kg*K)]
  sigmaSB = 5.670374419e-8[W/(m^2*K^4)]
  hExternal = 30.0[W/(m^2*K)]
  emissivity = 1.0
  tol = 1e-7[m]

Selections
  selAirIn: Box "框"
    entitydim = 2
    xmin = -tol
    xmax = tol
    ymin = -tol
    ymax = W+tol
    zmin = -tol
    zmax = Hair+tol
    condition = inside
  selAirOut: Box "框 2"
    entitydim = 2
    xmin = L-tol
    xmax = L+tol
    ymin = -tol
    ymax = W+tol
    zmin = -tol
    zmax = Hair+tol
    condition = inside
  selSource: Box "框 3"
    entitydim = 2
    xmin = -tol
    xmax = tol
    ymin = -tol
    ymax = W+tol
    zmin = -tol
    zmax = Hair+Hs+tol
    condition = inside
  selTarget: Box "框 4"
    entitydim = 2
    xmin = L-tol
    xmax = L+tol
    ymin = -tol
    ymax = W+tol
    zmin = -tol
    zmax = Hair+Hs+tol
    condition = inside
  selHeatTop: Box "框 5"
    entitydim = 2
    xmin = -tol
    xmax = L+tol
    ymin = -tol
    ymax = W+tol
    zmin = Hair+Hs-tol
    zmax = Hair+Hs+tol
    condition = inside
  selSolidX0: Box "框 6"
    entitydim = 2
    xmin = -tol
    xmax = tol
    ymin = -tol
    ymax = W+tol
    zmin = Hair-tol
    zmax = Hair+Hs+tol
    condition = inside
  selSolidXL: Box "框 7"
    entitydim = 2
    xmin = L-tol
    xmax = L+tol
    ymin = -tol
    ymax = W+tol
    zmin = Hair-tol
    zmax = Hair+Hs+tol
    condition = inside
  selSolidY0: Box "框 8"
    entitydim = 2
    xmin = -tol
    xmax = L+tol
    ymin = -tol
    ymax = tol
    zmin = Hair-tol
    zmax = Hair+Hs+tol
    condition = inside
  selSolidYW: Box "框 9"
    entitydim = 2
    xmin = -tol
    xmax = L+tol
    ymin = W-tol
    ymax = W+tol
    zmin = Hair-tol
    zmax = Hair+Hs+tol
    condition = inside
  selExternalSolid: Union "并集" | entitydim = 2; input = {selHeatTop, selSolidX0, selSolidXL, selSolidY0, selSolidYW}
  selAllDomains: Explicit "显式" on all domains
  selWidthBottom: Box "框 10"
    entitydim = 1
    xmin = -tol
    xmax = tol
    ymin = -tol
    ymax = W+tol
    zmin = -tol
    zmax = tol
    condition = inside
  selWidthInterface: Box "框 11"
    entitydim = 1
    xmin = -tol
    xmax = tol
    ymin = -tol
    ymax = W+tol
    zmin = Hair-tol
    zmax = Hair+tol
    condition = inside
  selWidthTop: Box "框 12"
    entitydim = 1
    xmin = -tol
    xmax = tol
    ymin = -tol
    ymax = W+tol
    zmin = Hair+Hs-tol
    zmax = Hair+Hs+tol
    condition = inside
  selWidthEdges: Union "并集 2" | entitydim = 1; input = {selWidthBottom, selWidthInterface, selWidthTop}
  selAirZ0: Box "框 13"
    entitydim = 1
    xmin = -tol
    xmax = tol
    ymin = -tol
    ymax = tol
    zmin = -tol
    zmax = Hair+tol
    condition = inside
  selAirZW: Box "框 14"
    entitydim = 1
    xmin = -tol
    xmax = tol
    ymin = W-tol
    ymax = W+tol
    zmin = -tol
    zmax = Hair+tol
    condition = inside
  selAirThickness: Union "并集 3" | entitydim = 1; input = {selAirZ0, selAirZW}
  selSolidZ0: Box "框 15"
    entitydim = 1
    xmin = -tol
    xmax = tol
    ymin = -tol
    ymax = tol
    zmin = Hair-tol
    zmax = Hair+Hs+tol
    condition = inside
  selSolidZW: Box "框 16"
    entitydim = 1
    xmin = -tol
    xmax = tol
    ymin = W-tol
    ymax = W+tol
    zmin = Hair-tol
    zmax = Hair+Hs+tol
    condition = inside
  selSolidThickness: Union "并集 4" | entitydim = 1; input = {selSolidZ0, selSolidZW}

Couplings
  intSolid: Integration "积分 2" on selection geom1_solid_dom
  intHeat: Integration "积分 3" on selection selHeatTop
  intExt: Integration "积分 4" on selection selExternalSolid
  aveIn: Average "平均值" on selection selAirIn
  aveOut: Average "平均值 2" on selection selAirOut
  maxSolid: Maximum "最大值" on selection geom1_solid_dom
  minSolid: Minimum "最小值" on selection geom1_solid_dom

Geometry
  geom1 "几何 1" (3D, length unit m)
    air: Block "长方体" | size = {L, W, Hair}
    solid: Block "长方体 2" | size = {L, W, Hs}; pos = {0, 0, Hair}
    fin: Finalize "形成联合体"

Materials
  matAir: Common "材料" on selection geom1_air_dom
    def: def "基本"
      density = rhoAir
      heatcapacity = CpAir
      thermalconductivity = 0.0251[W/(m*K)]
      dynamicviscosity = 1.849e-5[Pa*s]
  matGraphite: Common "材料 2" on selection geom1_solid_dom
    def: def "基本"
      density = 2250[kg/m^3]
      heatcapacity = 460[J/(kg*K)]
      thermalconductivity = 24[W/(m*K)]

Physics
  ht: HeatTransferInSolidsAndFluids "固体和流体传热" on all domains
    dependent variable T
    solid1: SolidHeatTransferModel "固体 1" (default)
    fluid1: FluidHeatTransferModel "流体 1" on selection geom1_air_dom | u_src = userdef; u = {uin, 0, 0}
    init1: init "初始值 1" (default) | Tinit = Tin
    ins1: ThermalInsulation "热绝缘 1" (default)
    in1: Inflow "流入 1" on selection selAirIn | Tustr = Tin
    heat1: HeatFluxBoundary "热通量 1" on selection selHeatTop | q0 = qflux
    conv1: HeatFluxBoundary "热通量 1a" on selection selExternalSolid
      HeatFluxType = ConvectiveHeatFlux
      h = hExternal
      Text = Tamb
    rad1: SurfaceToAmbientRadiation "表面对环境辐射 1" on selection selExternalSolid
      epsilon_rad_mat = userdef
      epsilon_rad = emissivity
      Tamb = Tamb

Mesh
  mesh1 "网格 1"
    size: MeshSizeDefault "大小" | hmax = 0.0249; hmin = 0.00449; hcurve = 0.6; hnarrow = 0.5; hgrad = 1.5
    edgWidth: Edge "边" on selection selWidthEdges
      dis1: Distribution "分布 1" on edges 2, 5, 7 | numelem = 24
    edgAir: Edge "边 2" on selection selAirThickness
      dis1: Distribution "分布 1" on edges 1, 9 | numelem = 4
    edgSolid: Edge "边 3" on selection selSolidThickness
      dis1: Distribution "分布 1" on edges 4, 11 | numelem = 8
    map1: Map "映射 1" on selection selSource
    swe1: Sweep "扫掠 1" on selection selAllDomains | sourceface = selection selSource; targetface = selection selTarget
      dis1: Distribution "分布 1" on domains 1, 2 | numelem = 60

Studies
  std1 "研究 1"
    param: Parametric "参数化扫描" | pname = uin; plistarr = 4 5 6 8 10 12; punit = m/s
    stat: Stationary "稳态"

Solver configurations
  sol1 "解 1" (study std1)
    v1: Variables "因变量 1"
    s1: Stationary "稳态求解器 1"
      p1: Parametric "参数化 1"
      fc1: FullyCoupled "全耦合 1"
      d1: Direct "直接，传热变量 (ht)"

Datasets
  dset1: Solution | solution = sol1

Derived values
  gevMetrics: EvalGlobal "全局计算"
    data = dset1
    table = tblFinal
    expr = {intSolid(if(x<L/3,T-273.15[K],0[K]))/intSolid(if(x<L/3,1,0)), intSolid(if(x>=L/3&&x<2*L/3,T-273.15[K],0[K]))/intSolid(if(x>=L/3&&x<2*L/3,1,0)), intSolid(if(x>=2*L/3,T-273.15[K],0[K]))/intSolid(if(x>=2*L/3,1,0)), maxSolid(T)-273.15[K], minSolid(T)-273.15[K], maxSolid(T)-minSolid(T), maxSolid(T,x)/L, maxSolid(T,y), maxSolid(T,z), aveIn(T)-273.15[K], aveOut(T)-273.15[K], rhoAir*uin*AinCell*CpAir*(aveOut(T)-Tin), intExt(hExternal*(T-Tamb)), intExt(emissivity*sigmaSB*(T^4-Tamb^4)), 0[W], intHeat(qflux), abs((intHeat(qflux))-(rhoAir*uin*AinCell*CpAir*(aveOut(T)-Tin))-(intExt(hExternal*(T-Tamb)))-(intExt(emissivity*sigmaSB*(T^4-Tamb^4))))/abs(intHeat(qflux)), rhoAir*uin*AinCell, nCells*(rhoAir*uin*AinCell), abs(nCells*(rhoAir*uin*AinCell)-rhoAir*uin*AinStack)/(rhoAir*uin*AinStack)}

Plots
  pgTemp: PlotGroup3D "三维绘图组" | data = dset1
    surf1: Surface "表面 1" | expr = T-273.15[K]

Exports
  tblExport: Table "表格" | table = tblFinal; filename = comsol/v7_runtime/physical_heat_metrics_medium.csv
  imgTemp: Image "图像" | width = 1200; height = 700; pngfilename = comsol/v7_runtime/physical_fig7_like_12ms.png