// COMSOL Multiphysics 6.4.0.293 model "v9_equivalent_confirmation_coarse.mph"
// Outline of the model tree

Parameters
  Tamb = 25[degC]
  Tin = 25[degC]
  L = 0.24936900555275113[m]
  AinTotal = 3962[mm^2]
  Aheat = 0.0247[m^2]
  qTotal = 59.90985[W]
  width = Aheat/L
  solidThickness = 10[mm]
  Asolid = width*solidThickness
  Aexternal = 0.03166838011105502[m^2]
  Pext = Aexternal/L
  kGraphite = 24[W/(m*K)]
  rhoAir = 1.184[kg/m^3]
  CpAir = 1007[J/(kg*K)]
  kAir = 0.0251[W/(m*K)]
  muAir = 1.849e-5[Pa*s]
  emissivity = 0.82
  sigmaSB = 5.670374419e-8[W/(m^2*K^4)]
  gravity = 9.80665[m/s^2]
  uin = 4[m/s]
  h0 = 88.75329934335754[W/(m^2*K)]
  velExponent = 0.6572949080566769
  coolingBias = 1.3679347347371371
  heatSkew = -0.3118665087792232

Variables
  var1 "变量 1" on selection selDomain
    xi = x/L
    hForced = h0*(uin/(8[m/s]))^velExponent*exp(-coolingBias*(xi-0.5))
    hP = hForced*width
    qRaw = 1+heatSkew*(2*xi-1)
    qLine = qTotal*qRaw/intop(qRaw)
    mdot = rhoAir*uin*AinTotal
    mcp = mdot*CpAir
    nuAir = muAir/rhoAir
    alphaAir = kAir/(rhoAir*CpAir)
    PrAir = nuAir/alphaAir
    filmT = (T+Tamb)/2
    RaL = gravity*(1/filmT)*max(T-Tamb,1e-6[K])*L^3/(nuAir*alphaAir)
    NuNatural = (0.825+0.387*RaL^(1/6)/(1+(0.492/PrAir)^(9/16))^(8/27))^2
    hNatural = NuNatural*kAir/L
    qExternalLine = Pext*(hNatural*(T-Tamb)+emissivity*sigmaSB*(T^4-Tamb^4))

Selections
  selDomain: Explicit "显式" on all domains
  selInlet: Explicit "显式 2" on boundaries 1
  selOutlet: Explicit "显式 3" on boundaries 2

Couplings
  intop: Integration "积分" on selection selDomain
  maxop: Maximum "最大值" on selection selDomain
  minop: Minimum "最小值" on selection selDomain
  outop: Average "平均值" on selection selOutlet

Geometry
  geom1 "几何 1" (1D, length unit m)
    interval1: Interval "线段间隔 1" | coord = {0, L}; p1 = 0; p2 = L
    fin: Finalize "形成联合体"

Physics
  solid: GeneralFormPDE "一般形式偏微分方程" on all domains
    dependent variable T
    Units.DependentVariableQuantity = temperature
    Units.CustomSourceTermUnit = W/m
    gfeq1: GeneralFormPDE "一般形式偏微分方程 1" (default) | f = qLine-hP*(T-Ta)-qExternalLine; Ga = -kGraphite*Asolid*Tx; da = 1
    zflx1: ZeroFluxBoundary "零通量 1" (default)
    init1: init "初始值 1" (default) | T = 45[degC]
  air: GeneralFormPDE "一般形式偏微分方程 2" on all domains
    dependent variable Ta
    Units.DependentVariableQuantity = temperature
    Units.CustomSourceTermUnit = W/m
    gfeq1: GeneralFormPDE "一般形式偏微分方程 1" (default) | f = hP*(T-Ta)-mcp*Tax; Ga = 0[W]; da = 1
    zflx1: ZeroFluxBoundary "零通量 1" (default)
    init1: init "初始值 1" (default) | Ta = Tin
    inletTemperature: DirichletBoundary "狄利克雷边界条件" on selection selInlet | r = Tin

Mesh
  mesh1 "网格 1"
    size: MeshSizeDefault "大小" | hmax = 0.0167; hmin = 7.48E-5; hcurve = 0.3; hgrad = 1.3
    edge1: Edge "边 1" on selection selDomain
      distribution1: Distribution "分布 1" on domains 1 | numelem = 50

Studies
  std1 "研究 1"
    param: Parametric "参数化扫描" | pname = uin; plistarr = 4 5 6 8 10 12; punit = m/s
    stat: Stationary "稳态"

Solver configurations
  sol1 "解 1" (study std1)
    v1: Variables "因变量 1"
    s1: Stationary "稳态求解器 1"
      dDef: Direct "直接"
      p1: Parametric "参数化 1"
      fc1: FullyCoupled "全耦合 1"

Datasets
  dset1: Solution | solution = sol1

Derived values
  metrics: EvalGlobal "全局计算"
    data = dset1
    table = metricsTable
    expr = {intop(if(x<L/3,T-273.15[K],0[K]))/intop(if(x<L/3,1,0)), intop(if(x>=L/3&&x<2*L/3,T-273.15[K],0[K]))/intop(if(x>=L/3&&x<2*L/3,1,0)), intop(if(x>=2*L/3,T-273.15[K],0[K]))/intop(if(x>=2*L/3,1,0)), maxop(T)-273.15[K], minop(T)-273.15[K], maxop(T)-minop(T), maxop(T,x)/L, outop(Ta)-273.15[K], rhoAir*uin*AinTotal*CpAir*(outop(Ta)-Tin), intop(Pext*hNatural*(T-Tamb)), intop(Pext*emissivity*sigmaSB*(T^4-Tamb^4)), intop(qLine), abs((intop(qLine))-(rhoAir*uin*AinTotal*CpAir*(outop(Ta)-Tin))-(intop(Pext*hNatural*(T-Tamb)))-(intop(Pext*emissivity*sigmaSB*(T^4-Tamb^4))))/abs(intop(qLine)), rhoAir*uin*AinTotal}

Exports
  metricsExport: Table "表格" | table = metricsTable; filename = comsol/v9_confirmation/metrics_coarse.csv
  profileExport: Data "数据"
    data = dset1
    expr = {T-273.15[K], Ta-273.15[K]}
    filename = comsol/v9_confirmation/profiles_coarse.csv
    sort = on